# Análisis Dinámico Modal Espectral
# Ingeniería Sismorresistente y Prevención de Desastres ES831 H
# R.C.
# PARÁMETROS SÍSMICOS E030
# Ubicación: Zona 4
Z := 0.45
# Uso: Centro de Salud
U := 1.5
# Tipo de suelo: S2
S := 1.05
# Periodo corto
T_P := 0.6
# Periodo largo
T_L := 2.0
# Sistema Estructural: C.A. Pórticos
R_0 := 8
# Regular en planta
I_p := 1
# Regular en altura
I_a := 1
# Coeficiente de reducción
R := R_0*I_p*I_a = 8
# COEFICIENTE DE AMPLIFICACIÓN SÍSMICA E030
C(x) := if(x < T_P, 2.5, if(T_P < x and x < T_L, 2.5*T_P/x, 2.5*(T_P*T_L/x^2)))
# [plot: C(x) vs x]
# DEFINICIÓN DE MASAS Y RIGIDECES
# Nota: Dirección Larga (más desfavorable)
# Peso sísmico
w6 := 890.599 tonnef
m6 := w6/g = 0.908158 tonnef*s^2/cm
k6 := 906.449 tonnef/cm
w5 := 1011.459 tonnef
m5 := w5/g = 1.0314 tonnef*s^2/cm
k5 := 906.449 tonnef/cm
w4 := 1011.459 tonnef
m4 := w4/g = 1.0314 tonnef*s^2/cm
k4 := 906.449 tonnef/cm
w3 := 1011.459 tonnef
m3 := w3/g = 1.0314 tonnef*s^2/cm
k3 := 906.449 tonnef/cm
w2 := 1013.072 tonnef
m2 := w2/g = 1.03305 tonnef*s^2/cm
k2 := 922.508 tonnef/cm
w1 := 993.843 tonnef
m1 := w1/g = 1.01344 tonnef*s^2/cm
k1 := 1797.101 tonnef/cm
mM := [
    m6, 0, 0, 0, 0, 0;
    0, m5, 0, 0, 0, 0;
    0, 0, m4, 0, 0, 0;
    0, 0, 0, m3, 0, 0;
    0, 0, 0, 0, m2, 0;
    0, 0, 0, 0, 0, m1
]
mK := [
    k6, -k6, 0, 0, 0, 0;
    -k6, k5 + k6, -k5, 0, 0, 0;
    0, -k5, k4 + k5, -k4, 0, 0;
    0, 0, -k4, k3 + k4, -k3, 0;
    0, 0, 0, -k3, k2 + k3, -k2;
    0, 0, 0, 0, -k2, k1 + k2
]
# OBTENCIÓN DE FRECUENCIAS Y PERIODOS
det(mK - a*mM) == 0
A == mI/a == mK^-1*mM
matrizA := mK^-1*mM = [
    0.00549733, 0.00510551, 0.00396766, 0.00282981, 0.00169466, 0.000563929;
    0.00449545, 0.00510551, 0.00396766, 0.00282981, 0.00169466, 0.000563929;
    0.00349356, 0.00396766, 0.00396766, 0.00282981, 0.00169466, 0.000563929;
    0.00249168, 0.00282981, 0.00282981, 0.00282981, 0.00169466, 0.000563929;
    0.00148979, 0.00169197, 0.00169197, 0.00169197, 0.00169466, 0.000563929;
    0.000505346, 0.000573925, 0.000573925, 0.000573925, 0.00057484, 0.000563929
] s^2
aaa := eigenvecs(matrizA) = [
    0.569144, 0.54367, 0.490265, 0.401452, 0.267351, -0.0831944;
    0.533467, 0.252636, -0.167777, -0.506093, -0.54702, 0.207862;
    0.459809, -0.19199, -0.570066, -0.114274, 0.530994, -0.326975;
    0.353416, -0.519894, -0.103367, 0.570937, -0.227935, 0.437351;
    0.221863, -0.531724, 0.520901, -0.2097, -0.198335, -0.53604;
    0.0770537, -0.225203, 0.352837, -0.446884, 0.50601, 0.60361
]
# Las frecuencias se denominan de menor a mayor
ω_i := csort(1/eigenvals(matrizA), 0) = [62.5688; 534.306; 1339.69; 2256.4; 3040.34; 3491.92] 1/s^2
# Periodos
ω_1 := |sqrt(ω_i[0, :])| = 7.91004 1/s
ω_2 := |sqrt(ω_i[1, :])| = 23.1151 1/s
ω_3 := |sqrt(ω_i[2, :])| = 36.6018 1/s
T_1 := 2*π/ω_1 = 0.79433 s
T_2 := 2*π/ω_2 = 0.271822 s
T_3 := 2*π/ω_3 = 0.171663 s
ω_4 := |sqrt(ω_i[3, :])| = 47.5016 1/s
ω_5 := |sqrt(ω_i[4, :])| = 55.1393 1/s
ω_6 := |sqrt(ω_i[5, :])| = 59.0925 1/s
T_4 := 2*π/ω_4 = 0.132273 s
T_5 := 2*π/ω_5 = 0.113951 s
T_6 := 2*π/ω_6 = 0.106328 s
# ESPECTROS DE DISEÑO E030
# ESPECTRO DE ACELERACIONES m/s^2 | ESPECTRO DE VELOCIDADES cm/s
# [plot: Z*U*C(x)*S/R*g vs x]
# [plot: Z*U*C(x)*S/R*g*x*s/(2*π) (cm/s) vs x]
S_a := [
    Z*U*C(T_1*s^-1)*S/R*g;
    Z*U*C(T_2*s^-1)*S/R*g;
    Z*U*C(T_3*s^-1)*S/R*g;
    Z*U*C(T_4*s^-1)*S/R*g;
    Z*U*C(T_5*s^-1)*S/R*g;
    Z*U*C(T_6*s^-1)*S/R*g
] = [1.64064; 2.17202; 2.17202; 2.17202; 2.17202; 2.17202] m/s^2
S_v := [
    Z*U*C(T_1*s^-1)*S/R*g*ω_1^-1;
    Z*U*C(T_2*s^-1)*S/R*g*ω_2^-1;
    Z*U*C(T_3*s^-1)*S/R*g*ω_3^-1;
    Z*U*C(T_4*s^-1)*S/R*g*ω_4^-1;
    Z*U*C(T_5*s^-1)*S/R*g*ω_5^-1;
    Z*U*C(T_6*s^-1)*S/R*g*ω_6^-1
] = [20.7413; 9.39656; 5.93419; 4.57252; 3.93915; 3.67563] cm/s
S_d := [
    Z*U*C(T_1*s^-1)*S/R*g*ω_1^-2;
    Z*U*C(T_2*s^-1)*S/R*g*ω_2^-2;
    Z*U*C(T_3*s^-1)*S/R*g*ω_3^-2;
    Z*U*C(T_4*s^-1)*S/R*g*ω_4^-2;
    Z*U*C(T_5*s^-1)*S/R*g*ω_5^-2;
    Z*U*C(T_6*s^-1)*S/R*g*ω_6^-2
] = [2.62214; 0.406513; 0.162128; 0.0962603; 0.0714401; 0.0622012] cm/s*s
# [plot: Z*U*C(x)*S/R*g*(x*s/(2*π))^2 (cm) vs x]
# ESPECTRO DE DESPLAZAMIENTOS cm
S_a = [1.64064; 2.17202; 2.17202; 2.17202; 2.17202; 2.17202] m/s^2
S_v = [20.7413; 9.39656; 5.93419; 4.57252; 3.93915; 3.67563] cm/s
S_d = [2.62214; 0.406513; 0.162128; 0.0962603; 0.0714401; 0.0622012] cm
# OBTENCIÓN DE MODOS DE VIBRACIÓN
i := transpose([6, 5, 4, 3, 2, 1])
# PRIMER MODO
aaa[:, 0]/aaa[5, 0] = [7.38634; 6.92331; 5.96739; 4.58663; 2.87932; 1]
ϕ_mod1 := aaa[:, 0]/aaa[5, 0] = [7.38634; 6.92331; 5.96739; 4.58663; 2.87932; 1]
ϕ_mod2 := aaa[:, 1]/aaa[5, 1] = [-2.41413; -1.12182; 0.852519; 2.30856; 2.36109; 1]
ϕ_mod3 := aaa[:, 2]/aaa[5, 2] = [1.38949; -0.475507; -1.61566; -0.29296; 1.47632; 1]
Mod1 := mK - ω_1^2*mM = [
    849.627, -906.449, 0, 0, 0, 0;
    -906.449, 1748.36, -906.449, 0, 0, 0;
    0, -906.449, 1748.36, -906.449, 0, 0;
    0, 0, -906.449, 1748.36, -906.449, 0;
    0, 0, 0, -906.449, 1764.32, -922.508;
    0, 0, 0, 0, -922.508, 2656.2
] tonnef/cm
# [plot: stack(i, 0) vs stack(ϕ_mod1, 0)]
ϕ_mod4 := aaa[:, 3]/aaa[5, 3] = [-0.898337; 1.13249; 0.255712; -1.2776; 0.469249; 1]
ϕ_mod5 := aaa[:, 4]/aaa[5, 4] = [0.528352; -1.08105; 1.04937; -0.450456; -0.391959; 1]
ϕ_mod6 := aaa[:, 5]/aaa[5, 5] = [-0.137828; 0.344365; -0.541699; 0.724558; -0.888056; 1]
ϕ_mod1 = [7.38634; 6.92331; 5.96739; 4.58663; 2.87932; 1]
# SEGUNDO MODO
Mod2 := mK - ω_2^2*mM = [
    421.215, -906.449, 0, 0, 0, 0;
    -906.449, 1261.81, -906.449, 0, 0, 0;
    0, -906.449, 1261.81, -906.449, 0, 0;
    0, 0, -906.449, 1261.81, -906.449, 0;
    0, 0, 0, -906.449, 1276.99, -922.508;
    0, 0, 0, 0, -922.508, 2178.12
] tonnef/cm
# [plot: stack(i, 0) vs stack(ϕ_mod2, 0)]
ϕ_mod2 = [-2.41413; -1.12182; 0.852519; 2.30856; 2.36109; 1]
ϕ_mod1_i := [
    -(Mod1[0, 1]/Mod1[0, 0]*(-((Mod1[2, 2]*(-((Mod1[3, 3]*(-((Mod1[4, 5] + Mod1[4, 4]*(-Mod1[5, 5]/Mod1[5, 4]))/Mod1[4, 3])) + Mod1[3, 4]*(-Mod1[5, 5]/Mod1[5, 4]))/Mod1[3, 2])) + Mod1[2, 3]*(-((Mod1[4, 5] + Mod1[4, 4]*(-Mod1[5, 5]/Mod1[5, 4]))/Mod1[4, 3])))/Mod1[4, 3])));
    -((Mod1[2, 2]*(-((Mod1[3, 3]*(-((Mod1[4, 5] + Mod1[4, 4]*(-Mod1[5, 5]/Mod1[5, 4]))/Mod1[4, 3])) + Mod1[3, 4]*(-Mod1[5, 5]/Mod1[5, 4]))/Mod1[3, 2])) + Mod1[2, 3]*(-((Mod1[4, 5] + Mod1[4, 4]*(-Mod1[5, 5]/Mod1[5, 4]))/Mod1[4, 3])))/Mod1[4, 3]);
    -((Mod1[3, 3]*(-((Mod1[4, 5] + Mod1[4, 4]*(-Mod1[5, 5]/Mod1[5, 4]))/Mod1[4, 3])) + Mod1[3, 4]*(-Mod1[5, 5]/Mod1[5, 4]))/Mod1[3, 2]);
    -((Mod1[4, 5] + Mod1[4, 4]*(-Mod1[5, 5]/Mod1[5, 4]))/Mod1[4, 3]);
    -Mod1[5, 5]/Mod1[5, 4];
    1
] = [7.38634; 6.92331; 5.96739; 4.58663; 2.87932; 1]
# TERCER MODO
Mod3 := mK - ω_3^2*mM = [
    -310.202, -906.449, 0, 0, 0, 0;
    -906.449, 431.14, -906.449, 0, 0, 0;
    0, -906.449, 431.14, -906.449, 0, 0;
    0, 0, -906.449, 431.14, -906.449, 0;
    0, 0, 0, -906.449, 444.995, -922.508;
    0, 0, 0, 0, -922.508, 1361.92
] tonnef/cm
# [plot: stack(i, 0) vs stack(ϕ_mod3, 0)]
ϕ_mod3 = [1.38949; -0.475507; -1.61566; -0.29296; 1.47632; 1]
# CUARTO MODO
Mod4 := mK - ω_4^2*mM = [
    -1142.72, -906.449, 0, 0, 0, 0;
    -906.449, -514.357, -906.449, 0, 0, 0;
    0, -906.449, -514.357, -906.449, 0, 0;
    0, 0, -906.449, -514.357, -906.449, 0;
    0, 0, 0, -906.449, -502.01, -922.508;
    0, 0, 0, 0, -922.508, 432.886
] tonnef/cm
# [plot: stack(i, 0) vs stack(ϕ_mod4, 0)]
ϕ_mod4 = [-0.898337; 1.13249; 0.255712; -1.2776; 0.469249; 1]
# QUINTO MODO
Mod5 := mK - ω_5^2*mM = [
    -1854.66, -906.449, 0, 0, 0, 0;
    -906.449, -1322.91, -906.449, 0, 0, 0;
    0, -906.449, -1322.91, -906.449, 0, 0;
    0, 0, -906.449, -1322.91, -906.449, 0;
    0, 0, 0, -906.449, -1311.85, -922.508;
    0, 0, 0, 0, -922.508, -361.586
] tonnef/cm
# [plot: stack(i, 0) vs stack(ϕ_mod5, 0)]
ϕ_mod5 = [0.528352; -1.08105; 1.04937; -0.450456; -0.391959; 1]
# SEXTO MODO
Mod6 := mK - ω_6^2*mM = [
    -2264.77, -906.449, 0, 0, 0, 0;
    -906.449, -1788.68, -906.449, 0, 0, 0;
    0, -906.449, -1788.68, -906.449, 0, 0;
    0, 0, -906.449, -1788.68, -906.449, 0;
    0, 0, 0, -906.449, -1778.36, -922.508;
    0, 0, 0, 0, -922.508, -819.238
] tonnef/cm
# [plot: stack(i, 0) vs stack(ϕ_mod6, 0)]
ϕ_mod6 = [-0.137828; 0.344365; -0.541699; 0.724558; -0.888056; 1]
# MATRIZ MODAL
ϕ_mod := augment(ϕ_mod1, ϕ_mod2, ϕ_mod3, ϕ_mod4, ϕ_mod5, ϕ_mod6)
ϕ_mod = [
    7.38634, -2.41413, 1.38949, -0.898337, 0.528352, -0.137828;
    6.92331, -1.12182, -0.475507, 1.13249, -1.08105, 0.344365;
    5.96739, 0.852519, -1.61566, 0.255712, 1.04937, -0.541699;
    4.58663, 2.30856, -0.29296, -1.2776, -0.450456, 0.724558;
    2.87932, 2.36109, 1.47632, 0.469249, -0.391959, -0.888056;
    1, 1, 1, 1, 1, 1
]
# FACTORES DE PARTICIPACIÓN
# PRECÁLCULOS
B := transpose([1, 1, 1, 1, 1, 1])
transpose(ϕ_mod)*mM*B = [2872.2; 336.343; 134.143; 79.6446; 59.1086; 51.4645] tonnef*s^2/m
transpose(ϕ_mod)*mM*ϕ_mod*B = [16698.8; 1960.96; 803.241; 504.757; 397.607; 281.183] tonnef*s^2/m
# FACTOR DE PARTICIPACIÓN DE MASA (FPM)
# Modo 1
# Modo 2
# Modo 3
FPM := transpose(ϕ_mod)*mM*B/(transpose(ϕ_mod)*mM*ϕ_mod*B) = [0.172; 0.17152; 0.167002; 0.157788; 0.148661; 0.183029]
# Modo 4
# Modo 5
# Modo 6
# MASA EFECTIVA MODAL - PORCENTAJE DE PARTICIPACIÓN DE MASA
φ := (transpose(ϕ_mod)*mM*B)^2/(transpose(ϕ_mod)*mM*ϕ_mod*B) = [494.019; 57.6896; 22.4022; 12.567; 8.78713; 9.41948] tonnef*s^2/m
# Mayor al 90% (E.030)
sum(φ) = 604.885 tonnef*s^2/m
ppm := φ/sum(φ) = [0.816717; 0.0953729; 0.0370355; 0.0207758; 0.014527; 0.0155724]
ppm[0] + ppm[1] = 0.912089
# El 90% de participación de masa se alcanza con el segundo modo; de acuerdo con la norma E.030, se debe trabajar al menos con los tres primeros modos o hasta que se alcance el 90% de participación con modos superiores. Con fines académicos, se seguirá analizando considerando los 6 modos obtenidos de los cálculos matriciales.
# DESPLAZAMIENTOS
# DESPLAZAMIENTOS n MÁXIMOS
n_max := vectorize(FPM*S_d) = [0.451009; 0.069725; 0.0270758; 0.0151887; 0.0106203; 0.0113846] cm
# MATRIZ R MODAL
R_mod := diag(n_max) = [
    0.451009, 0, 0, 0, 0, 0;
    0, 0.069725, 0, 0, 0, 0;
    0, 0, 0.0270758, 0, 0, 0;
    0, 0, 0, 0.0151887, 0, 0;
    0, 0, 0, 0, 0.0106203, 0;
    0, 0, 0, 0, 0, 0.0113846
] cm
# DESPLAZAMIENTOS MODALES
# Piso 6
# Piso 5
# Piso 4
U_mod := ϕ_mod*R_mod = [
    3.33131, -0.168325, 0.0376217, -0.0136446, 0.00561128, -0.00156912;
    3.12248, -0.0782186, -0.0128748, 0.0172011, -0.0114811, 0.00392046;
    2.69135, 0.0594419, -0.0437453, 0.00388394, 0.0111447, -0.00616703;
    2.06861, 0.160964, -0.00793212, -0.0194051, -0.00478399, 0.00824881;
    1.2986, 0.164627, 0.0399725, 0.0071273, -0.00416274, -0.0101102;
    0.451009, 0.069725, 0.0270758, 0.0151887, 0.0106203, 0.0113846
] cm
# Piso 3
# Piso 2
# Piso 1
# COMBINACIÓN DE RESPUESTAS  De acuerdo con Art. 29.3.4. (E.030)
# DESPLAZAMIENTOS
U_E030_1 :=
    for i ∈ 0 .. 5
        U[i, :] ← 0 cm
        for j ∈ 0 .. 5
            U[i, :] ← U[i, :] + ||(0.75*R*U_mod[:, j])[i, :]||
    U
U_E030_1 = [21.3485; 19.477; 16.8944; 13.6197; 9.14761; 3.51002] cm
U_E030_2 :=
    for i ∈ 0 .. 5
        U[i, :] ← 0 cm^2
        for j ∈ 0 .. 5
            U[i, :] ← U[i, :] + |((0.75*R*U_mod[:, j])^2)[i, :]|
    sqrt(U)
U_E030_2 = [20.0148; 18.7413; 16.1544; 12.4499; 7.85802; 2.74612] cm
U_E030 := 0.25*U_E030_1 + 0.75*U_E030_2 = [20.3482; 18.9253; 16.3394; 12.7424; 8.18042; 2.9371] cm
# DERIVAS
Δ_mod :=
    for i ∈ 0 .. 5
        for j ∈ 0 .. 5
            if i < 5
                Δ[i, j] ← U_mod[i, j] - U_mod[i + 1, j]
            else
                Δ[i, j] ← U_mod[i, j]
    Δ
H := [310; 310; 310; 310; 310; 310] cm
δ_mod :=
    for i ∈ 0 .. 5
        δ[:, i] ← vectorize(Δ_mod[:, i]*vectorize(H^-1))
    δ
Δ_mod = [
    0.208829, -0.0901068, 0.0504964, -0.0308457, 0.0170924, -0.00548958;
    0.43113, -0.137661, 0.0308706, 0.0133172, -0.0226258, 0.0100875;
    0.622737, -0.101522, -0.0358132, 0.023289, 0.0159287, -0.0144158;
    0.770009, -0.00366273, -0.0479047, -0.0265324, -0.000621253, 0.018359;
    0.847592, 0.0949019, 0.0128967, -0.00806143, -0.0147831, -0.0214948;
    0.451009, 0.069725, 0.0270758, 0.0151887, 0.0106203, 0.0113846
] cm
δ_mod = [
    0.000673641, -0.000290667, 0.000162892, -9.95024e-5, 5.51366e-5, -1.77083e-5;
    0.00139074, -0.000444066, 9.95826e-5, 4.29587e-5, -7.29864e-5, 3.25403e-5;
    0.00200883, -0.000327491, -0.000115527, 7.51258e-5, 5.13829e-5, -4.65027e-5;
    0.0024839, -1.18152e-5, -0.000154531, -8.55883e-5, -2.00404e-6, 5.92225e-5;
    0.00273417, 0.000306135, 4.16024e-5, -2.60046e-5, -4.76873e-5, -6.9338e-5;
    0.00145487, 0.000224919, 8.73414e-5, 4.89959e-5, 3.42592e-5, 3.67246e-5
]
δ_E030_1 :=
    for i ∈ 0 .. 5
        δ[i, :] ← 0
        for j ∈ 0 .. 5
            δ[i, :] ← δ[i, :] + ||(0.75*R*δ_mod[:, j])[i, :]||
    δ
δ_E030_1 = [0.00779728; 0.0124972; 0.0157491; 0.0167824; 0.0193496; 0.0113227]
δ_E030_2 :=
    for i ∈ 0 .. 5
        δ[i, :] ← 0
        for j ∈ 0 .. 5
            δ[i, :] ← δ[i, :] + |((0.75*R*δ_mod[:, j])^2)[i, :]|
    sqrt(δ)
δ_E030_2 = [0.00456185; 0.00879671; 0.0122471; 0.0149454; 0.0165179; 0.00885845]
δ_E030 := 0.25*δ_E030_1 + 0.75*δ_E030_2 = [0.00537071; 0.00972184; 0.0131226; 0.0154047; 0.0172258; 0.0094745]
# GRÁFICA Y COMPARACIÓN CON LÍMITE  No debe exceder 0.007 (E.030)
# [plot: stack(i, 0) vs stack(δ_E030, 0)]
δ_E030 = [0.00537071; 0.00972184; 0.0131226; 0.0154047; 0.0172258; 0.0094745]
# Piso 6
if(δ_E030[0] ≤ 0.007, "Cumple", "No cumple") = "Cumple"
# Piso 5
if(δ_E030[1] ≤ 0.007, "Cumple", "No cumple") = "No cumple"
# Piso 4
if(δ_E030[2] ≤ 0.007, "Cumple", "No cumple") = "No cumple"
vectorize(U_E030/H) = [0.0656394; 0.0610492; 0.0527076; 0.0411044; 0.0263884; 0.0094745]
# Piso 3
if(δ_E030[3] ≤ 0.007, "Cumple", "No cumple") = "No cumple"
# Piso 2
if(δ_E030[4] ≤ 0.007, "Cumple", "No cumple") = "No cumple"
# Piso 1
if(δ_E030[5] ≤ 0.007, "Cumple", "No cumple") = "No cumple"
# Como se observa en la comparación, las derivas superan los límites de la norma E.030 en todos los pisos excepto el último. Es necesario el reforzamiento y/o rediseño.
