# Análisis Dinámico Modal Espectral
# Ingeniería Sismorresistente y Prevención de Desastres ES831 H
# R.C.
# PARÁMETROS SÍSMICOS E030
# Ubicación: Zona 4
Z := 0.45
# Uso: Centro de Salud
U := 1.5
# Tipo de suelo: S2
S := 1.05
# Periodo corto
T_P := 0.6
# Periodo largo
T_L := 2.0
# Sistema Estructural: C.A. Dual
R_0 := 7
# Regular en planta
I_p := 1
# Regular en altura
I_a := 1
# Coeficiente de reducción
R := R_0*I_p*I_a = 7
# COEFICIENTE DE AMPLIFICACIÓN SÍSMICA E030
C(x) := if(x < T_P, 2.5, if(T_P < x and x < T_L, 2.5*T_P/x, 2.5*(T_P*T_L/x^2)))
# [plot: C(x) vs x]
# DEFINICIÓN DE MASAS Y RIGIDECES
# Nota: Dirección Larga (más desfavorable)
# Peso sísmico
w6 := 829.458 tonnef
m6 := w6/g = 0.845812 tonnef*s^2/cm
k6 := 11657.01 tonnef/cm
w5 := 1054.794 tonnef
m5 := w5/g = 1.07559 tonnef*s^2/cm
k5 := 11657.01 tonnef/cm
w4 := 1054.794 tonnef
m4 := w4/g = 1.07559 tonnef*s^2/cm
k4 := 11657.01 tonnef/cm
w3 := 1054.794 tonnef
m3 := w3/g = 1.07559 tonnef*s^2/cm
k3 := 11657.01 tonnef/cm
w2 := 1054.794 tonnef
m2 := w2/g = 1.07559 tonnef*s^2/cm
k2 := 11657.01 tonnef/cm
w1 := 1031.994 tonnef
m1 := w1/g = 1.05234 tonnef*s^2/cm
k1 := 11735.81 tonnef/cm
mM := [
    m6, 0, 0, 0, 0, 0;
    0, m5, 0, 0, 0, 0;
    0, 0, m4, 0, 0, 0;
    0, 0, 0, m3, 0, 0;
    0, 0, 0, 0, m2, 0;
    0, 0, 0, 0, 0, m1
]
mK := [
    k6, -k6, 0, 0, 0, 0;
    -k6, k5 + k6, -k5, 0, 0, 0;
    0, -k5, k4 + k5, -k4, 0, 0;
    0, 0, -k4, k3 + k4, -k3, 0;
    0, 0, 0, -k3, k2 + k3, -k2;
    0, 0, 0, 0, -k2, k1 + k2
]
# OBTENCIÓN DE FRECUENCIAS Y PERIODOS
det(mK - a*mM) == 0
A == mI/a == mK^-1*mM
matrizA := mK^-1*mM = [
    0.000434862, 0.00046073, 0.00036846, 0.00027619, 0.00018392, 8.96692e-5;
    0.000362304, 0.00046073, 0.00036846, 0.00027619, 0.00018392, 8.96692e-5;
    0.000289746, 0.00036846, 0.00036846, 0.00027619, 0.00018392, 8.96692e-5;
    0.000217187, 0.00027619, 0.00027619, 0.00027619, 0.00018392, 8.96692e-5;
    0.000144629, 0.00018392, 0.00018392, 0.00018392, 0.00018392, 8.96692e-5;
    7.2071e-5, 9.16503e-5, 9.16503e-5, 9.16503e-5, 9.16503e-5, 8.96692e-5
] s^2
aaa := eigenvecs(matrizA) = [
    0.544677, 0.532648, 0.504077, 0.449306, 0.353012, -0.200384;
    0.518014, 0.307607, -0.0382741, -0.378074, -0.539426, 0.398157;
    0.459106, -0.0827034, -0.528258, -0.320108, 0.302316, -0.515673;
    0.371618, -0.428579, -0.295467, 0.487464, 0.172155, 0.529245;
    0.260997, -0.544191, 0.341589, 0.153528, -0.51146, -0.436136;
    0.13413, -0.367424, 0.511275, -0.539929, 0.449197, 0.255115
]
# Las frecuencias se denominan de menor a mayor
ω_i := csort(1/eigenvals(matrizA), 0) = [674.645; 5822.85; 14828.5; 25379.1; 34841.9; 41166.5] 1/s^2
# Periodos
ω_1 := |sqrt(ω_i[0, :])| = 25.9739 1/s
ω_2 := |sqrt(ω_i[1, :])| = 76.3076 1/s
ω_3 := |sqrt(ω_i[2, :])| = 121.772 1/s
T_1 := 2*π/ω_1 = 0.241904 s
T_2 := 2*π/ω_2 = 0.0823403 s
T_3 := 2*π/ω_3 = 0.0515978 s
ω_4 := |sqrt(ω_i[3, :])| = 159.308 1/s
ω_5 := |sqrt(ω_i[4, :])| = 186.66 1/s
ω_6 := |sqrt(ω_i[5, :])| = 202.895 1/s
T_4 := 2*π/ω_4 = 0.0394404 s
T_5 := 2*π/ω_5 = 0.0336611 s
T_6 := 2*π/ω_6 = 0.0309676 s
# ESPECTROS DE DISEÑO E030
# ESPECTRO DE ACELERACIONES m/s^2 | ESPECTRO DE VELOCIDADES cm/s
# [plot: Z*U*C(x)*S/R*g vs x]
# [plot: Z*U*C(x)*S/R*g*x*s/(2*π) (cm/s) vs x]
S_a := [
    Z*U*C(T_1*s^-1)*S/R*g;
    Z*U*C(T_2*s^-1)*S/R*g;
    Z*U*C(T_3*s^-1)*S/R*g;
    Z*U*C(T_4*s^-1)*S/R*g;
    Z*U*C(T_5*s^-1)*S/R*g;
    Z*U*C(T_6*s^-1)*S/R*g
] = [2.48231; 2.48231; 2.48231; 2.48231; 2.48231; 2.48231] m/s^2
S_v := [
    Z*U*C(T_1*s^-1)*S/R*g*ω_1^-1;
    Z*U*C(T_2*s^-1)*S/R*g*ω_2^-1;
    Z*U*C(T_3*s^-1)*S/R*g*ω_3^-1;
    Z*U*C(T_4*s^-1)*S/R*g*ω_4^-1;
    Z*U*C(T_5*s^-1)*S/R*g*ω_5^-1;
    Z*U*C(T_6*s^-1)*S/R*g*ω_6^-1
] = [9.55692; 3.25303; 2.03848; 1.55818; 1.32986; 1.22344] cm/s
S_d := [
    Z*U*C(T_1*s^-1)*S/R*g*ω_1^-2;
    Z*U*C(T_2*s^-1)*S/R*g*ω_2^-2;
    Z*U*C(T_3*s^-1)*S/R*g*ω_3^-2;
    Z*U*C(T_4*s^-1)*S/R*g*ω_4^-2;
    Z*U*C(T_5*s^-1)*S/R*g*ω_5^-2;
    Z*U*C(T_6*s^-1)*S/R*g*ω_6^-2
] = [0.367943; 0.0426305; 0.0167401; 0.00978091; 0.00712448; 0.00602992] cm/s*s
# [plot: Z*U*C(x)*S/R*g*(x*s/(2*π))^2 (cm) vs x]
# ESPECTRO DE DESPLAZAMIENTOS cm
S_a = [2.48231; 2.48231; 2.48231; 2.48231; 2.48231; 2.48231] m/s^2
S_v = [9.55692; 3.25303; 2.03848; 1.55818; 1.32986; 1.22344] cm/s
S_d = [0.367943; 0.0426305; 0.0167401; 0.00978091; 0.00712448; 0.00602992] cm
# OBTENCIÓN DE MODOS DE VIBRACIÓN
i := transpose([6, 5, 4, 3, 2, 1])
# PRIMER MODO
aaa[:, 0]/aaa[5, 0] = [4.06082; 3.86203; 3.42284; 2.77058; 1.94586; 1]
ϕ_mod1 := aaa[:, 0]/aaa[5, 0] = [4.06082; 3.86203; 3.42284; 2.77058; 1.94586; 1]
ϕ_mod2 := aaa[:, 1]/aaa[5, 1] = [-1.44968; -0.8372; 0.22509; 1.16644; 1.4811; 1]
ϕ_mod3 := aaa[:, 2]/aaa[5, 2] = [0.985922; -0.0748602; -1.03322; -0.577902; 0.668112; 1]
Mod1 := mK - ω_1^2*mM = [
    11086.4, -11657, 0, 0, 0, 0;
    -11657, 22588.4, -11657, 0, 0, 0;
    0, -11657, 22588.4, -11657, 0, 0;
    0, 0, -11657, 22588.4, -11657, 0;
    0, 0, 0, -11657, 22588.4, -11657;
    0, 0, 0, 0, -11657, 22682.9
] tonnef/cm
# [plot: stack(i, 0) vs stack(ϕ_mod1, 0)]
ϕ_mod4 := aaa[:, 3]/aaa[5, 3] = [-0.832158; 0.70023; 0.592871; -0.90283; -0.284349; 1]
ϕ_mod5 := aaa[:, 4]/aaa[5, 4] = [0.785873; -1.20087; 0.673013; 0.383251; -1.13861; 1]
ϕ_mod6 := aaa[:, 5]/aaa[5, 5] = [-0.785464; 1.56069; -2.02133; 2.07453; -1.70956; 1]
ϕ_mod1 = [4.06082; 3.86203; 3.42284; 2.77058; 1.94586; 1]
# SEGUNDO MODO
Mod2 := mK - ω_2^2*mM = [
    6731.98, -11657, 0, 0, 0, 0;
    -11657, 17051, -11657, 0, 0, 0;
    0, -11657, 17051, -11657, 0, 0;
    0, 0, -11657, 17051, -11657, 0;
    0, 0, 0, -11657, 17051, -11657;
    0, 0, 0, 0, -11657, 17265.2
] tonnef/cm
# [plot: stack(i, 0) vs stack(ϕ_mod2, 0)]
ϕ_mod2 = [-1.44968; -0.8372; 0.22509; 1.16644; 1.4811; 1]
ϕ_mod1_i := [
    -(Mod1[0, 1]/Mod1[0, 0]*(-((Mod1[2, 2]*(-((Mod1[3, 3]*(-((Mod1[4, 5] + Mod1[4, 4]*(-Mod1[5, 5]/Mod1[5, 4]))/Mod1[4, 3])) + Mod1[3, 4]*(-Mod1[5, 5]/Mod1[5, 4]))/Mod1[3, 2])) + Mod1[2, 3]*(-((Mod1[4, 5] + Mod1[4, 4]*(-Mod1[5, 5]/Mod1[5, 4]))/Mod1[4, 3])))/Mod1[4, 3])));
    -((Mod1[2, 2]*(-((Mod1[3, 3]*(-((Mod1[4, 5] + Mod1[4, 4]*(-Mod1[5, 5]/Mod1[5, 4]))/Mod1[4, 3])) + Mod1[3, 4]*(-Mod1[5, 5]/Mod1[5, 4]))/Mod1[3, 2])) + Mod1[2, 3]*(-((Mod1[4, 5] + Mod1[4, 4]*(-Mod1[5, 5]/Mod1[5, 4]))/Mod1[4, 3])))/Mod1[4, 3]);
    -((Mod1[3, 3]*(-((Mod1[4, 5] + Mod1[4, 4]*(-Mod1[5, 5]/Mod1[5, 4]))/Mod1[4, 3])) + Mod1[3, 4]*(-Mod1[5, 5]/Mod1[5, 4]))/Mod1[3, 2]);
    -((Mod1[4, 5] + Mod1[4, 4]*(-Mod1[5, 5]/Mod1[5, 4]))/Mod1[4, 3]);
    -Mod1[5, 5]/Mod1[5, 4];
    1
] = [4.06082; 3.86203; 3.42284; 2.77058; 1.94586; 1]
# TERCER MODO
Mod3 := mK - ω_3^2*mM = [
    -885.107, -11657, 0, 0, 0, 0;
    -11657, 7364.63, -11657, 0, 0, 0;
    0, -11657, 7364.63, -11657, 0, 0;
    0, 0, -11657, 7364.63, -11657, 0;
    0, 0, 0, -11657, 7364.63, -11657;
    0, 0, 0, 0, -11657, 7788.18
] tonnef/cm
# [plot: stack(i, 0) vs stack(ϕ_mod3, 0)]
ϕ_mod3 = [0.985922; -0.0748602; -1.03322; -0.577902; 0.668112; 1]
# CUARTO MODO
Mod4 := mK - ω_4^2*mM = [
    -9808.94, -11657, 0, 0, 0, 0;
    -11657, -3983.51, -11657, 0, 0, 0;
    0, -11657, -3983.51, -11657, 0, 0;
    0, 0, -11657, -3983.51, -11657, 0;
    0, 0, 0, -11657, -3983.51, -11657;
    0, 0, 0, 0, -11657, -3314.66
] tonnef/cm
# [plot: stack(i, 0) vs stack(ϕ_mod4, 0)]
ϕ_mod4 = [-0.832158; 0.70023; 0.592871; -0.90283; -0.284349; 1]
# QUINTO MODO
Mod5 := mK - ω_5^2*mM = [
    -17812.7, -11657, 0, 0, 0, 0;
    -11657, -14161.6, -11657, 0, 0, 0;
    0, -11657, -14161.6, -11657, 0, 0;
    0, 0, -11657, -14161.6, -11657, 0;
    0, 0, 0, -11657, -14161.6, -11657;
    0, 0, 0, 0, -11657, -13272.8
] tonnef/cm
# [plot: stack(i, 0) vs stack(ϕ_mod5, 0)]
ϕ_mod5 = [0.785873; -1.20087; 0.673013; 0.383251; -1.13861; 1]
# SEXTO MODO
Mod6 := mK - ω_6^2*mM = [
    -23162.1, -11657, 0, 0, 0, 0;
    -11657, -20964.3, -11657, 0, 0, 0;
    0, -11657, -20964.3, -11657, 0, 0;
    0, 0, -11657, -20964.3, -11657, 0;
    0, 0, 0, -11657, -20964.3, -11657;
    0, 0, 0, 0, -11657, -19928.4
] tonnef/cm
# [plot: stack(i, 0) vs stack(ϕ_mod6, 0)]
ϕ_mod6 = [-0.785464; 1.56069; -2.02133; 2.07453; -1.70956; 1]
# MATRIZ MODAL
ϕ_mod := augment(ϕ_mod1, ϕ_mod2, ϕ_mod3, ϕ_mod4, ϕ_mod5, ϕ_mod6)
ϕ_mod = [
    4.06082, -1.44968, 0.985922, -0.832158, 0.785873, -0.785464;
    3.86203, -0.8372, -0.0748602, 0.70023, -1.20087, 1.56069;
    3.42284, 0.22509, -1.03322, 0.592871, 0.673013, -2.02133;
    2.77058, 1.16644, -0.577902, -0.90283, 0.383251, 2.07453;
    1.94586, 1.4811, 0.668112, -0.284349, -1.13861, -1.70956;
    1, 1, 1, 1, 1, 1
]
# FACTORES DE PARTICIPACIÓN
# PRECÁLCULOS
B := transpose([1, 1, 1, 1, 1, 1])
transpose(ϕ_mod)*mM*B = [1739.55; 201.548; 79.1436; 46.242; 33.683; 28.5081] tonnef*s^2/m
transpose(ϕ_mod)*mM*ϕ_mod*B = [5597.32; 746.119; 386.81; 350.719; 516.54; 1636.12] tonnef*s^2/m
# FACTOR DE PARTICIPACIÓN DE MASA (FPM)
# Modo 1
# Modo 2
# Modo 3
FPM := transpose(ϕ_mod)*mM*B/(transpose(ϕ_mod)*mM*ϕ_mod*B) = [0.310783; 0.270128; 0.204606; 0.131849; 0.0652089; 0.0174242]
# Modo 4
# Modo 5
# Modo 6
# MASA EFECTIVA MODAL - PORCENTAJE DE PARTICIPACIÓN DE MASA
φ := (transpose(ϕ_mod)*mM*B)^2/(transpose(ϕ_mod)*mM*ϕ_mod*B) = [540.624; 54.4437; 16.1933; 6.09697; 2.19643; 0.496732] tonnef*s^2/m
# Mayor al 90% (E.030)
sum(φ) = 620.051 tonnef*s^2/m
ppm := φ/sum(φ) = [0.871902; 0.0878051; 0.026116; 0.00983301; 0.00354234; 0.000801114]
(ppm[0] + ppm[1]) = 0.959708
# El 90% de participación de masa se alcanza con el segundo modo; de acuerdo con la norma E.030, se debe trabajar al menos con los tres primeros modos o hasta que se alcance el 90% de participación con modos superiores. Con fines académicos, se seguirá analizando considerando los 6 modos obtenidos de los cálculos matriciales.
# DESPLAZAMIENTOS
# DESPLAZAMIENTOS n MÁXIMOS
n_max := vectorize(FPM*S_d) = [0.114351; 0.0115157; 0.00342513; 0.0012896; 0.00046458; 0.000105067] cm
# MATRIZ R MODAL
R_mod := diag(n_max) = [
    0.114351, 0, 0, 0, 0, 0;
    0, 0.0115157, 0, 0, 0, 0;
    0, 0, 0.00342513, 0, 0, 0;
    0, 0, 0, 0.0012896, 0, 0;
    0, 0, 0, 0, 0.00046458, 0;
    0, 0, 0, 0, 0, 0.000105067
] cm
# DESPLAZAMIENTOS MODALES
# Piso 6
# Piso 5
# Piso 4
U_mod := ϕ_mod*R_mod = [
    0.464357, -0.0166941, 0.00337691, -0.00107316, 0.000365101, -8.25261e-5;
    0.441626, -0.00964094, -0.000256406, 0.000903021, -0.000557899, 0.000163977;
    0.391404, 0.00259207, -0.0035389, 0.000764569, 0.000312668, -0.000212375;
    0.316818, 0.0134324, -0.00197939, -0.00116429, 0.000178051, 0.000217964;
    0.22251, 0.0170559, 0.00228837, -0.000366698, -0.000528975, -0.000179618;
    0.114351, 0.0115157, 0.00342513, 0.0012896, 0.00046458, 0.000105067
] cm
# Piso 3
# Piso 2
# Piso 1
# COMBINACIÓN DE RESPUESTAS  De acuerdo con Art. 29.3.4. (E.030)
# DESPLAZAMIENTOS
U_E030_1 :=
    for i ∈ 0 .. 5
        U[i, :] ← 0 cm
        for j ∈ 0 .. 5
            U[i, :] ← U[i, :] + ||(0.75*R*U_mod[:, j])[i, :]||
    U
U_E030_1 = [2.55123; 2.37903; 2.09383; 1.7524; 1.27538; 0.688541] cm
U_E030_2 :=
    for i ∈ 0 .. 5
        U[i, :] ← 0 cm^2
        for j ∈ 0 .. 5
            U[i, :] ← U[i, :] + |((0.75*R*U_mod[:, j])^2)[i, :]|
    sqrt(U)
U_E030_2 = [2.43952; 2.3191; 2.05501; 1.66483; 1.17167; 0.603688] cm
U_E030 := 0.25*U_E030_1 + 0.75*U_E030_2 = [2.46745; 2.33408; 2.06471; 1.68672; 1.1976; 0.624901] cm
# DERIVAS
Δ_mod :=
    for i ∈ 0 .. 5
        for j ∈ 0 .. 5
            if i < 5
                Δ[i, j] ← U_mod[i, j] - U_mod[i + 1, j]
            else
                Δ[i, j] ← U_mod[i, j]
    Δ
H := [310; 310; 310; 310; 310; 310] cm
δ_mod :=
    for i ∈ 0 .. 5
        δ[:, i] ← vectorize(Δ_mod[:, i]*vectorize(H^-1))
    δ
Δ_mod = [
    0.0227307, -0.00705319, 0.00363332, -0.00197618, 0.000922999, -0.000246503;
    0.0502217, -0.012233, 0.0032825, 0.000138452, -0.000870567, 0.000376351;
    0.0745864, -0.0108404, -0.00155951, 0.00192886, 0.000134618, -0.000430339;
    0.0943081, -0.00362347, -0.00426776, -0.000797596, 0.000707025, 0.000397582;
    0.108159, 0.0055402, -0.00113676, -0.0016563, -0.000993555, -0.000284685;
    0.114351, 0.0115157, 0.00342513, 0.0012896, 0.00046458, 0.000105067
] cm
δ_mod = [
    7.3325e-5, -2.27522e-5, 1.17204e-5, -6.37476e-6, 2.97742e-6, -7.95171e-7;
    0.000162005, -3.94613e-5, 1.05887e-5, 4.46618e-7, -2.80828e-6, 1.21404e-6;
    0.000240601, -3.49689e-5, -5.03068e-6, 6.22214e-6, 4.34251e-7, -1.38819e-6;
    0.00030422, -1.16886e-5, -1.3767e-5, -2.57289e-6, 2.28073e-6, 1.28252e-6;
    0.000348901, 1.78716e-5, -3.66697e-6, -5.34291e-6, -3.20502e-6, -9.18338e-7;
    0.000368873, 3.71474e-5, 1.10488e-5, 4.16002e-6, 1.49864e-6, 3.38925e-7
]
δ_E030_1 :=
    for i ∈ 0 .. 5
        δ[i, :] ← 0
        for j ∈ 0 .. 5
            δ[i, :] ← δ[i, :] + ||(0.75*R*δ_mod[:, j])[i, :]||
    δ
δ_E030_1 = [0.000619211; 0.00113675; 0.00151539; 0.00176301; 0.0019945; 0.0022211]
δ_E030_2 :=
    for i ∈ 0 .. 5
        δ[i, :] ← 0
        for j ∈ 0 .. 5
            δ[i, :] ← δ[i, :] + |((0.75*R*δ_mod[:, j])^2)[i, :]|
    sqrt(δ)
δ_E030_2 = [0.000409423; 0.00087731; 0.00127714; 0.00160008; 0.00183453; 0.00194738]
δ_E030 := 0.25*δ_E030_1 + 0.75*δ_E030_2 = [0.00046187; 0.000942171; 0.0013367; 0.00164081; 0.00187452; 0.00201581]
# GRÁFICA Y COMPARACIÓN CON LÍMITE  No debe exceder 0.007 (E.030)
# [plot: stack(i, 0) vs stack(δ_E030, 0)]
δ_E030 = [0.00046187; 0.000942171; 0.0013367; 0.00164081; 0.00187452; 0.00201581]
# Piso 6
if(δ_E030[0] ≤ 0.007, "Cumple", "No cumple") = "Cumple"
# Piso 5
if(δ_E030[1] ≤ 0.007, "Cumple", "No cumple") = "Cumple"
# Piso 4
if(δ_E030[2] ≤ 0.007, "Cumple", "No cumple") = "Cumple"
vectorize(U_E030/H) = [0.0079595; 0.00752928; 0.00666036; 0.00544104; 0.00386322; 0.00201581]
# Piso 3
if(δ_E030[3] ≤ 0.007, "Cumple", "No cumple") = "Cumple"
# Piso 2
if(δ_E030[4] ≤ 0.007, "Cumple", "No cumple") = "Cumple"
# Piso 1
if(δ_E030[5] ≤ 0.007, "Cumple", "No cumple") = "Cumple"
# Como se observa en la comparación, las derivas no superan los límites de la norma E.030. La edificación cumple las especificaciones de la norma.
